# OpenSim document version 40500
ScaleTool scaledCGM2:
  mass: 42.5 [kg]
  height: -1
  age: -1
  ModelScaler:
    apply: true
    scaling_order: measurements manualScale
    marker_file: C3D/Caso03/pyCGM2 lower limb CGM23 Static.c3d.trc
    time_range: 0 4.21
    preserve_mass_distribution: true
    MeasurementSet:
      Measurement pelvis_ZY: apply=true
        MarkerPair: markers=(RASI LASI)
        BodyScale pelvis: axes=(Y Z)
      Measurement thight_R_Y: apply=true
        MarkerPair: markers=(RHJC_CGM_2.3 RKJC_CGM_2.3)
        BodyScale femur_r: axes=Y
      Measurement thight_L_Y: apply=true
        MarkerPair: markers=(LHJC_CGM_2.3 LKJC_CGM_2.3)
        BodyScale femur_l: axes=Y
      Measurement shank_R_Y: apply=true
        MarkerPair: markers=(RKJC_CGM_2.3 RAJC_CGM_2.3)
        BodyScale tibia_r: axes=Y
      Measurement shank_L_Y: apply=true
        MarkerPair: markers=(LKJC_CGM_2.3 LAJC_CGM_2.3)
        BodyScale tibia_l: axes=Y
      Measurement foot_R_XY: apply=true
        MarkerPair: markers=(RHEE RTOE)
        BodyScale talus_r: axes=(X Y Z)
        BodyScale calcn_r: axes=(X Y Z)
        BodyScale toes_r: axes=(X Y Z)
      Measurement foot_L_XY: apply=true
        MarkerPair: markers=(LHEE LTOE)
        BodyScale talus_l: axes=(X Y Z)
        BodyScale calcn_l: axes=(X Y Z)
        BodyScale toes_l: axes=(X Y Z)
      Measurement thight_R_XZ: apply=true
        MarkerPair: markers=(RKNE RKJC_CGM_2.3)
        BodyScale femur_r: axes=(X Z)
      Measurement thight_L_XZ: apply=true
        MarkerPair: markers=(LKNE LKJC_CGM_2.3)
        BodyScale femur_l: axes=(X Z)
      Measurement shank_R_XZ: apply=true
        MarkerPair: markers=(RANK RAJC_CGM_2.3)
        BodyScale tibia_r: axes=(X Z)
      Measurement shank_L_XZ: apply=true
        MarkerPair: markers=(LANK LAJC_CGM_2.3)
        BodyScale tibia_l: axes=(X Z)
      Measurement pelvis_X: apply=true
        MarkerPair: markers=(RASI RPSI)
        BodyScale pelvis: axes=X
    ScaleSet:
      Scale: scales=(0.925855 0.925855 0.98) segment=femur_r apply=false
      Scale: scales=(1.09246 1.09246 0.82) segment=tibia_r apply=false
      Scale: scales=(0.959958 0.959958 0.98) segment=femur_l apply=false
      Scale: scales=(1.09206 1.09206 0.84) segment=tibia_l apply=false
  MarkerPlacer:
    apply: true
    marker_file: C3D/Caso03/pyCGM2 lower limb CGM23 Static.c3d.trc
    time_range: 0 0.275
    max_marker_movement: -1
    IKTaskSet:
      IKMarkerTask LPSI: apply=true weight=1
      IKMarkerTask RPSI: apply=true weight=1
      IKMarkerTask LASI: apply=true weight=0.5
      IKMarkerTask RASI: apply=true weight=0.5
      IKMarkerTask LKNE: apply=true weight=1
      IKMarkerTask LANK: apply=true weight=1
      IKMarkerTask LHEE: apply=true weight=0.5
      IKMarkerTask LTOE: apply=true weight=0.5
      IKMarkerTask RKNE: apply=true weight=1
      IKMarkerTask RANK: apply=true weight=1
      IKMarkerTask RHEE: apply=true weight=0.5
      IKMarkerTask RTOE: apply=true weight=0.5
      IKMarkerTask LHJC_CGM_2.3: apply=true weight=1
      IKMarkerTask LKJC_CGM_2.3: apply=true weight=1
      IKMarkerTask RHJC_CGM_2.3: apply=true weight=1
      IKMarkerTask RKJC_CGM_2.3: apply=true weight=1
      IKMarkerTask LAJC_CGM_2.3: apply=true weight=1
      IKMarkerTask RAJC_CGM_2.3: apply=true weight=1
      IKCoordinateTask [values shared by the 8 below unless stated]: weight=1 apply=false value_type=default_value
          value=0
      IKCoordinateTask pelvis_tilt: apply=true value_type=manual_value value=0.04363323
      IKCoordinateTask pelvis_list: apply=true value_type=manual_value value=-0.04363323
      IKCoordinateTask ankle_angle_r
      IKCoordinateTask subtalar_angle_r
      IKCoordinateTask mtp_angle_r
      IKCoordinateTask ankle_angle_l
      IKCoordinateTask subtalar_angle_l
      IKCoordinateTask mtp_angle_l
