# OpenSim document version 40500
MarkerSet:
  Marker LPSI: pelvis (-0.14 0.04 -0.056)
  Marker RPSI: pelvis (-0.14 0.04 0.056)
  Marker LASI: pelvis (0.01 0.04 -0.128)
  Marker RASI: pelvis (0.01 0.04 0.128)
  Marker LKNE: femur_l (0.01 -0.404 -0.043)
  Marker LANK: tibia_l (-0.005 -0.41 -0.053)
  Marker LHEE: calcn_l (-0.02 0.02 0)
  Marker LTOE: calcn_l (0.18 0.02 0)
  Marker RKNE: femur_r (0.01 -0.404 0.043)
  Marker RANK: tibia_r (-0.005 -0.41 0.053)
  Marker RHEE: calcn_r (-0.02 0.02 0)
  Marker RTOE: calcn_r (0.18 0.02 0)
  Marker LFEP: femur_l (0 0 0)
  Marker LFEO: femur_l (0 -0.396 0)
  Marker RFEP: femur_r (0 0 0)
  Marker RFEO: femur_r (0 -0.396 0)
  Marker LTIO: tibia_l (0 -0.41 0) fixed=true
  Marker RTIO: tibia_r (0 -0.41 0)
