# OpenSim document version 40500
InverseKinematicsTool:
  results_directory: ./
  constraint_weight: Inf
  accuracy: 1e-5
  time_range: 0 3.74
  output_motion_file: C:\Users\Carlo\Dropbox\Carlos\SARAH\CongressoMarcha2025\WorkshopOpenSim\C3D\Caso01\IK\ik.mot
  report_errors: true
  marker_file: C3D/Caso01/Walking 01.c3d.trc
  report_marker_locations: false
  IKTaskSet:
    IKMarkerTask LPSI: apply=true weight=1
    IKMarkerTask RPSI: apply=true weight=1
    IKMarkerTask LASI: apply=true weight=1
    IKMarkerTask RASI: apply=true weight=1
    IKMarkerTask LKNE: apply=true weight=1
    IKMarkerTask LANK: apply=true weight=1
    IKMarkerTask LHEE: apply=true weight=1
    IKMarkerTask LTOE: apply=true weight=1
    IKMarkerTask RKNE: apply=true weight=1
    IKMarkerTask RANK: apply=true weight=1
    IKMarkerTask RHEE: apply=true weight=1
    IKMarkerTask RTOE: apply=true weight=1
    IKMarkerTask LFEP: apply=true weight=1
    IKMarkerTask LFEO: apply=true weight=1
    IKMarkerTask RFEP: apply=true weight=1
    IKMarkerTask RFEO: apply=true weight=1
    IKMarkerTask LTIO: apply=true weight=1
    IKMarkerTask RTIO: apply=true weight=1
    IKCoordinateTask [values shared by the 5 below unless stated]: apply=false weight=1 value_type=default_value
        value=0
    IKCoordinateTask subtalar_angle_r
    IKCoordinateTask mtp_angle_r
    IKCoordinateTask hip_rotation_l: value_type=manual_value value=0.08726646
    IKCoordinateTask subtalar_angle_l
    IKCoordinateTask mtp_angle_l
