# OpenSim document version 40500
ScaleTool scaledPIG:
  mass: 42.5 [kg]
  height: -1
  age: -1
  ModelScaler:
    apply: true
    scaling_order: measurements manualScale
    marker_file: C3D/Caso01/Cal 01.c3d.trc
    time_range: 0 1.77
    preserve_mass_distribution: true
    MeasurementSet:
      Measurement pelvis_ZY: apply=false
        MarkerPair: markers=(RASI LASI)
      Measurement thight_R_Y: apply=true
        MarkerPair: markers=(RFEP RFEO)
        BodyScale femur_r: axes=Y
      Measurement thight_L_Y: apply=true
        MarkerPair: markers=(LFEP LFEO)
        BodyScale femur_l: axes=Y
      Measurement shank_R_Y: apply=true
        MarkerPair: markers=(RFEO RTIO)
        BodyScale tibia_r: axes=Y
      Measurement shank_L_Y: apply=true
        MarkerPair: markers=(LFEO LTIO)
        BodyScale tibia_l: axes=Y
      Measurement foot_R_XY: apply=true
        MarkerPair: markers=(RHEE RTOE)
        BodyScale talus_r: axes=(X Y Z)
        BodyScale calcn_r: axes=(X Y Z)
        BodyScale toes_r: axes=(X Y Z)
      Measurement foot_L_XY: apply=true
        MarkerPair: markers=(LHEE LTOE)
        BodyScale talus_l: axes=(X Y Z)
        BodyScale calcn_l: axes=(X Y Z)
        BodyScale toes_l: axes=(X Y Z)
      Measurement thight_R_XZ: apply=true
        MarkerPair: markers=(RKNE RFEO)
        BodyScale femur_r: axes=(X Z)
      Measurement thight_L_XZ: apply=true
        MarkerPair: markers=(LKNE LFEO)
        BodyScale femur_l: axes=(X Z)
      Measurement shank_R_XZ: apply=true
        MarkerPair: markers=(RANK RTIO)
        BodyScale tibia_r: axes=(X Z)
      Measurement shank_L_XZ: apply=true
        MarkerPair: markers=(LANK LTIO)
        BodyScale tibia_l: axes=(X Z)
      Measurement pelvis_X: apply=true
        MarkerPair: markers=(RASI LPSI)
        BodyScale pelvis: axes=(X Y Z)
    ScaleSet:
      Scale: scales=(0.925855 0.925855 0.98) segment=femur_r apply=false
      Scale: scales=(1.09246 1.09246 0.82) segment=tibia_r apply=false
      Scale: scales=(0.959958 0.959958 0.98) segment=femur_l apply=false
      Scale: scales=(1.09206 1.09206 0.84) segment=tibia_l apply=false
  MarkerPlacer:
    apply: true
    marker_file: C3D/Caso01/Cal 01.c3d.trc
    time_range: 0 0.275
    max_marker_movement: -1
    IKTaskSet:
      IKMarkerTask LPSI: apply=true weight=0.5
      IKMarkerTask RPSI: apply=true weight=0.5
      IKMarkerTask LASI: apply=true weight=0.5
      IKMarkerTask RASI: apply=true weight=0.5
      IKMarkerTask LKNE: apply=true weight=1
      IKMarkerTask LANK: apply=true weight=1
      IKMarkerTask LHEE: apply=true weight=0.5
      IKMarkerTask LTOE: apply=true weight=0.5
      IKMarkerTask RKNE: apply=true weight=1
      IKMarkerTask RANK: apply=true weight=1
      IKMarkerTask RHEE: apply=true weight=0.5
      IKMarkerTask RTOE: apply=true weight=0.5
      IKMarkerTask LFEP: apply=true weight=1
      IKMarkerTask LFEO: apply=true weight=1
      IKMarkerTask RFEP: apply=true weight=1
      IKMarkerTask RFEO: apply=true weight=1
      IKMarkerTask LTIO: apply=true weight=1
      IKMarkerTask RTIO: apply=true weight=1
      IKCoordinateTask [values shared by the 8 below unless stated]: weight=1 apply=false value_type=default_value
          value=0
      IKCoordinateTask pelvis_tilt: apply=true value_type=manual_value value=-0.06632251
      IKCoordinateTask pelvis_list: apply=true value_type=manual_value value=-0.03490659
      IKCoordinateTask ankle_angle_r
      IKCoordinateTask subtalar_angle_r
      IKCoordinateTask mtp_angle_r
      IKCoordinateTask ankle_angle_l
      IKCoordinateTask subtalar_angle_l
      IKCoordinateTask mtp_angle_l
